// SBML level 1 version 2

model gene_regulatory_network()

  // Compartments:
  compartment Cyt = 1.5;
  compartment Nuc in 1.5;

  // Species:
  species mRNA_nuc in Nuc = 0.0032834/Nuc;
  species RNA_nuc in Nuc = 96.117/Nuc;
  species RNAP in Nuc = 0.66349/Nuc;
  species mRNA_cyt in Cyt = 3.8742/Cyt;
  species P in Cyt = 22.035/Cyt;
  species RNA_cyt in Cyt = 0.0054086/Cyt;
  species AA in Cyt = 90.465/Cyt;
  species $src in Nuc = 1/Nuc;
  species $waste in Cyt = 1/Cyt;

  // Parameters:
  Vi = 10;
  Ki = 0.6;
  Vkd = 1;
  Vm1 = 50;
  Km1 = 1;
  k1 = 10000;
  Vm2 = 50;
  Km2 = 1;
  k2 = 10000;
  Vm3 = 50;
  Km3 = 80;
  Vm4 = 50;
  Km4 = 1;

  // Reactions:
  R1: $src => RNAP; Vi/(1+P/Ki);
  R2: RNAP => $waste; Vkd*RNAP;
  R3: RNA_nuc => mRNA_nuc; (Vm1*RNAP*RNA_nuc)/(Km1+RNA_nuc);
  R4: mRNA_nuc => mRNA_cyt; k1*mRNA_nuc;
  R5: mRNA_cyt => RNA_cyt; (Vm2*mRNA_cyt)/(mRNA_cyt+Km2);
  R6: RNA_cyt => RNA_nuc; k2*RNA_cyt;
  R7: AA => P; (Vm3*mRNA_cyt*AA)/(AA+Km3);
  R8: P => AA; (Vm4*P)/(P+Km4);
end
