// SBML level 2 version 3

model muCell Default()

  // Compartments:
  compartment compartment = 1;

  // Species:
  species CheA = 1000;
  species CheAp = 1;
  species Attractant = 1;
  species CheB = 1000;
  species CheBp = 0.5;
  species CheY = 100;
  species Repellent = 1;
  species CheYp = 1;

  // Reactions:
  R1: CheA => CheAp; 50*(Repellent+1)/(1+CheBp+Attractant*CheBp);  // modifiers: Attractant, CheBp, Repellent
  DephosCheA: CheAp => CheA; 50*CheAp;
  R3: CheB => CheBp; 8*(CheAp-1)*CheBp;  // modifiers: CheAp
  R4: CheY => CheYp; 10*CheAp;  // modifiers: CheAp
  R5: CheYp => CheY; 10*CheYp;
end
