// SBML level 2 version 3

model model_0000001()
  // bray1993_chemotaxis_intracellularreaction
  // This model originates from BioModels Database: A Database of Annotated Published Models. It is copyright (c) 2005-2008 The BioModels Team.
  // For more information see the terms of use.
  // To cite BioModels Database, please use Le Novère N., Bornstein B., Broicher A., Courtot M., Donizelli M., Dharuri H., Li L., Sauro H., Schilstra M., Shapiro B., Snoep J.L., Hucka M. (2006) BioModels Database: A Free, Centralized Database of Curated, Published, Quantitative Kinetic Models of Biochemical and Cellular Systems Nucleic Acids Res., 34: D689-D691.
  // biomodels.db:MODEL6929313478
  // isDescribedBy pubmed:8334303

  // Compartments:
  compartment cell = 1.41;
  compartment exterior = 1;

  // Species:
  species $asp in cell;
  species $ni in cell = 0;
  species T in cell = 3.12;
  species Tasp in cell = 0;
  species Tni in cell = 0;
  species W in cell = 2.89;
  species TW in cell = 0.591;
  species Tasp_W in cell = 0;
  species Tni_W in cell = 0;
  species TA in cell = 0.444;
  species Tasp_A in cell = 0;
  species Tni_A in cell = 0;
  species WA in cell = 0.678;
  species TWA in cell = 0.847;
  species Tasp_WA in cell = 0;
  species Tni_WA in cell = 0;
  species A in cell = 3;
  species Ap in cell = 0.0349;
  species B in cell = 1.93;
  species Bp in cell = 0.0687;
  species Z in cell = 20;
  species Y in cell = 9.99;
  species Yp in cell = 0.007;
  species M in cell = 0.00624;
  species MYp in cell = 0.00077;
  species MYpYp in cell = 0.000299;
  species MYpYpYp in cell = 0.000378;
  species MYpYpYpYp in cell = 0.00231;

  // Parameters:
  alpha = 0.14;
  kappa = 0.225;
  ka = 100 peruMpersec;
  Bias has dimensionless;
  asp_pulse = 0.01 uM;

  // Assignment rules:
  Bias := (M + MYp)/(M + MYp + MYpYp + MYpYpYp + MYpYpYpYp);
  asp := piecewise(asp_pulse, (time > 5) && (time < 10), 0);

  // Reactions:
  phosphorylation_r1: A => Ap; cell*phosphorylation_r1_k1*A;
    phosphorylation_r1_k1 = 0.001 persec;
  phosphorylation_r2: TWA + A => TWA + Ap; cell*phosphorylation_r2_k1*TWA*A;
    phosphorylation_r2_k1 = 0.059 peruMpersec;
  phosphorylation_r3: Tni_WA + A => Tni_WA + Ap; cell*phosphorylation_r3_k1*Tni_WA*A;
    phosphorylation_r3_k1 = 0.2 peruMpersec;
  phosphorylation_r4: Tasp_WA + Yp => Tasp_WA + Y; cell*phosphorylation_r4_k1*Tasp_WA*Yp;
    phosphorylation_r4_k1 = 100 peruMpersec;
  phosphorylation_r5: Ap + Y => A + Yp; cell*phosphorylation_r5_k1*Ap*Y;
    phosphorylation_r5_k1 = 0.2 peruMpersec;
  phosphorylation_r6: Y => Yp; cell*phosphorylation_r6_k1*Y;
    phosphorylation_r6_k1 = 0 persec;
  phosphorylation_r7: Yp => Y; cell*phosphorylation_r7_k1*Yp;
    phosphorylation_r7_k1 = 0.037 persec;
  phosphorylation_r8: Yp + Z => Y + Z; cell*phosphorylation_r8_k1*Yp*Z;
    phosphorylation_r8_k1 = 0.5 peruMpersec;
  phosphorylation_r9: Ap + B => A + Bp; cell*phosphorylation_r9_k1*Ap*B;
    phosphorylation_r9_k1 = 1 peruMpersec;
  phosphorylation_r10: Bp => B; cell*phosphorylation_r10_k1*Bp;
    phosphorylation_r10_k1 = 1 persec;
  regulatory_r1: T + $asp -> Tasp; cell*(regulatory_r1_k1*T*asp - regulatory_r1_k2*Tasp);
    regulatory_r1_k1 = 1 peruMpersec; regulatory_r1_k2 = 1 persec;
  regulatory_r2: T + $ni -> Tni; cell*(regulatory_r2_k1*T*ni - regulatory_r2_k2*Tni);
    regulatory_r2_k1 = 0.001 peruMpersec; regulatory_r2_k2 = 1 persec;
  regulatory_r3: T + W -> TW; cell*(regulatory_r3_k1*T*W - regulatory_r3_k2*TW);
    regulatory_r3_k1 = 0.1 peruMpersec; regulatory_r3_k2 = 1 persec;
  regulatory_r4: T + A -> TA; cell*(regulatory_r4_k1*T*A - regulatory_r4_k2*TA);
    regulatory_r4_k1 = 0.01 peruMpersec; regulatory_r4_k2 = 1 persec;
  regulatory_r5: W + A -> WA; cell*(regulatory_r5_k1*W*A - regulatory_r5_k2*WA);
    regulatory_r5_k1 = 0.1 peruMpersec; regulatory_r5_k2 = 1 persec;
  regulatory_r6: TW + A -> TWA; cell*(regulatory_r6_k1*TW*A - regulatory_r6_k2*TWA);
    regulatory_r6_k1 = 0.4 peruMpersec; regulatory_r6_k2 = 1 persec;
  regulatory_r7: TA + W -> TWA; cell*(regulatory_r7_k1*TA*W - regulatory_r7_k2*TWA);
    regulatory_r7_k1 = 0.4 peruMpersec; regulatory_r7_k2 = 1 persec;
  regulatory_r8: T + WA -> TWA; cell*(regulatory_r8_k1*T*WA - regulatory_r8_k2*TWA);
    regulatory_r8_k1 = 0.4 peruMpersec; regulatory_r8_k2 = 1 persec;
  regulatory_r9: Tasp + W -> Tasp_W; cell*(regulatory_r9_k1*Tasp*W - regulatory_r9_k2*Tasp_W);
    regulatory_r9_k1 = 0.1 peruMpersec; regulatory_r9_k2 = 1 persec;
  regulatory_r10: Tasp + A -> Tasp_A; cell*(regulatory_r10_k1*Tasp*A - regulatory_r10_k2*Tasp_A);
    regulatory_r10_k1 = 0.01 peruMpersec; regulatory_r10_k2 = 1 persec;
  regulatory_r11: Tasp_W + A -> Tasp_WA; cell*(regulatory_r11_k1*Tasp_W*A - regulatory_r11_k2*Tasp_WA); regulatory_r11 is "regulatory_r10";
    regulatory_r11_k1 = 0.4 peruMpersec; regulatory_r11_k2 = 1 persec;
  regulatory_r12: Tasp_A + W -> Tasp_WA; cell*(regulatory_r12_k1*Tasp_A*W - regulatory_r12_k2*Tasp_WA);
    regulatory_r12_k1 = 0.4 peruMpersec; regulatory_r12_k2 = 1 persec;
  regulatory_r13: Tasp + WA -> Tasp_WA; cell*(regulatory_r13_k1*Tasp*WA - regulatory_r13_k2*Tasp_WA);
    regulatory_r13_k1 = 0.4 peruMpersec; regulatory_r13_k2 = 1 persec;
  regulatory_r14: Tni + W -> Tni_W; cell*(regulatory_r14_k1*Tni*W - regulatory_r14_k2*Tni_W);
    regulatory_r14_k1 = 0.1 peruMpersec; regulatory_r14_k2 = 1 persec;
  regulatory_r15: Tni + A -> Tni_A; cell*(regulatory_r15_k1*Tni*A - regulatory_r15_k2*Tni_A);
    regulatory_r15_k1 = 0.01 peruMpersec; regulatory_r15_k2 = 1 persec;
  regulatory_r16: Tni_W + A -> Tni_WA; cell*(regulatory_r16_k1*Tni_W*A - regulatory_r16_k2*Tni_WA);
    regulatory_r16_k1 = 0.4 peruMpersec; regulatory_r16_k2 = 1 persec;
  regulatory_r17: Tni_A + W -> Tni_WA; cell*(regulatory_r17_k1*Tni_A*W - regulatory_r17_k2*Tni_WA);
    regulatory_r17_k1 = 0.4 peruMpersec; regulatory_r17_k2 = 1 persec;
  regulatory_r18: Tni + WA -> Tni_WA; cell*(regulatory_r18_k1*Tni*WA - regulatory_r18_k2*Tni_WA);
    regulatory_r18_k1 = 0.4 peruMpersec; regulatory_r18_k2 = 1 persec;
  motor_r1: M + Yp -> MYp; ka*(M*Yp - kappa/4*MYp);  // fast
  motor_r2: MYp + Yp -> MYpYp; ka*(MYp*Yp - 2*alpha*kappa/3*MYpYp);  // fast
  motor_r3: MYpYp + Yp -> MYpYpYp; ka*(MYpYp*Yp - 3*alpha*alpha*kappa/2*MYpYpYp);  // fast
  motor_r4: MYpYpYp + Yp -> MYpYpYpYp; ka*(MYpYpYp*Yp - 4*alpha*alpha*alpha*kappa*MYpYpYpYp);  // fast

  // Unit definitions:
  unit peruMpersec = litre / (1e-6 mole * second);
  unit persec = 1 / second;
  unit volume = 1e-15 litre; volume is "femtolitre";
  unit uM = 1e-6 mole / litre;
end
