// SBML level 2 version 3

model muCell Default()

  // Compartments:
  compartment compartment = 1;

  // Species:
  species CheA = 1;
  species CheAp = 1;
  species Attractant = 1;
  species CheB = 1;
  species CheBp = 1;
  species CheY = 1;
  species Repellent = 0;
  species CheYp = 1;
  species G = 1;
  species F = 0;

  // Reactions:
  R1: CheA => CheAp; 50*(Repellent+1)/(1+CheBp+Attractant*CheBp);  // modifiers: Attractant, CheBp, Repellent
  R2: CheAp => CheA; 50*CheAp;
  R3: CheB => CheBp; 8*(CheAp-1)*CheBp;  // modifiers: CheAp
  R4: CheY => CheYp; 10*CheAp;  // modifiers: CheAp
  R5: CheYp => CheY; 10*CheYp;
  R6: Attractant => F; 0.01;
  R7: G + F => Attractant; F*G*0.02;
end
