// SBML level 2 version 3

model muCell Default()

  // Compartments:
  compartment compartment = 1;

  // Species:
  species CheA = 0;
  species CheAp = 1;
  species Attractant = 0;
  species CheB = 1;
  species CheBp = 0;
  species CheY = 0;
  species CheYp = 1;
  species A = 1;

  // Reactions:
  R3: CheB => CheBp; 0.5*(1-CheAp);  // modifiers: CheAp
  R4: CheY => CheYp; 0.5*CheAp;  // modifiers: CheAp
  R5: CheYp => CheY; 10*CheYp;
  R6: A => Attractant; A*0.01;
  R2: CheA => CheAp; 0.5*CheA;
  R7: CheBp => CheB; 0.2*CheBp;
  R1: => CheA; (1-Attractant)*(1-CheBp)*0.5;  // modifiers: CheBp, Attractant
end
