// SBML level 2 version 3

model Smallest_chemical_reaction_system_with_Hopf_bifurcation()

  // Compartments:
  compartment compartment = 1;

  // Species:
  species CheA = 5;
  species CheAp = 5;
  species CheY = 5;
  species CheYp = 5;
  species R = 10;
  species Rm = 10;
  species CheBp = 10;
  species CheR = 1;
  species CheB = 10;
  species RateModifier = 1;

  // Reactions:
  AutoPhos: CheA => CheAp; CheA*k_1*RateModifier*(Rm/R);  // modifiers: RateModifier, Rm, R
    k_1 = 8;
  PhosTransfer: CheAp + CheY => CheA + CheYp; k_2*CheAp*CheY;
    k_2 = 8;
  DePhos: CheYp => CheY; k_3*CheYp;
    k_3 = 16;
  Methyl: R => Rm; k_4*R*CheR;  // modifiers: CheR
    k_4 = 0.2;
  Demethyl: Rm => R; k_5*Rm*CheBp;  // modifiers: CheBp
    k_5 = 0.2;
  R6: CheAp + CheB => CheBp + CheA; k_6*CheAp*CheB;
    k_6 = 8;
  DePhos2: CheBp => CheB; k_7*CheBp;
    k_7 = 8;
end
