// SBML level 2 version 3

model muCell Default()

  // Compartments:
  compartment compartment = 1;

  // Species:
  species CheA = 10;
  species CheAp = 1;
  species Attractant = 1;
  species CheB = 10;
  species CheBp = 1;
  species CheY = 10;
  species Repellent = 1;
  species CheYp = 1;
  species A = 2;

  // Reactions:
  R1: CheAp => CheA; 50*(Repellent+1)/(1+CheBp+Attractant*CheBp);  // modifiers: Attractant, CheBp, Repellent
  R2: CheA => CheAp; 50*CheA;
  R3: CheB => CheBp; 8*(CheAp-1)*CheBp;  // modifiers: CheAp
  R4: CheY => CheYp; 10*CheAp;  // modifiers: CheAp
  R5: CheYp => CheY; 10*CheYp;
  R6: A => Attractant; A*0.01;
end
